*Heading
** Job name: Job-1 Model name: Model-1
** Generated by: Abaqus/CAE Student Edition 6.12-2
*Preprint, echo=NO, model=NO, history=NO, contact=NO
**
** PARTS
**
*Part, name=Part-1
*End Part
**
**
** ASSEMBLY
**
*Assembly, name=Assembly
**
*Instance, name=Part-1-1, part=Part-1
*Node
      1,         105.,          10.,   5.13000011
      2,         105.,          10.,   14.8699999
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*Element, type=C3D8R
1,  47, 217, 358, 215,   1,  39, 214,  42
2, 217,  49, 216, 358,  39,   2,  40, 214
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*Nset, nset=Set-1, generate
   1,  374,    1
*Elset, elset=Set-1, generate
   1,  178,    1
** Section: BeamSection
*Solid Section, elset=Set-1, material=Steel
,
*End Instance
**
*Nset, nset=Set-1, instance=Part-1-1
  35,  36,  37,  38, 206, 207, 208, 209, 210, 211, 212, 213, 323, 324, 325
*Elset, elset=Set-1, instance=Part-1-1, generate
 171,  178,    1
*End Assembly
**
** MATERIALS
**
*Material, name=Steel
*Density
7987.,
*Elastic
 2.1e+11, 0.3
**
** BOUNDARY CONDITIONS
**
** Name: Wall Type: Symmetry/Antisymmetry/Encastre
*Boundary
Set-1, ENCASTRE
** ----------------------------------------------------------------
**
** STEP: FrequencyAnalysis
**
*Step, name=FrequencyAnalysis, perturbation
*Frequency, eigensolver=Lanczos, acoustic coupling=on, normalization=displacement
10, , , , ,
**
** OUTPUT REQUESTS
**
*Restart, write, frequency=0
**
** FIELD OUTPUT: F-Output-1
**
*Output, field, variable=PRESELECT
*Output, Field
*Node Print, Mode=1, Last Mode=5
U
*End Step
**
** MASS&Stiffness
*STEP
*MATRIX GENERATE, MASS, STIFFNESS
*MATRIX OUTPUT, MASS, STIFFNESS
*END STEP
**
