*Heading
** Job name: BenuliBeam Model name: Model-1
** Generated by: Abaqus/CAE Student Edition 6.12-2
*Preprint, echo=NO, model=NO, history=NO, contact=NO
**
** PARTS
**
*Part, name=Part-1
*Node
      1,       -1200.,           0.
      2,       -1185.,           0.
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*Element, type=B21
  1,   1,   2
  2,   2,   3
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*Nset, nset=Set-1, generate
   1,  101,    1
*Elset, elset=Set-1, generate
   1,  100,    1
** Section: Section-1  Profile: Profile-1
*Beam Section, elset=Set-1, material=rubber, temperature=GRADIENTS, section=RECT
50., 50.
0.,0.,-1.
*End Part
**
**
** ASSEMBLY
**
*Assembly, name=Assembly
**
*Instance, name=Part-1-1, part=Part-1
*End Instance
**
*Nset, nset=Set-1, instance=Part-1-1
 1,
*End Assembly
**
** MATERIALS
**
*Material, name=rubber
*Density
 9.2e-10,
*Elastic
50., 0.3
** ----------------------------------------------------------------
**
** MASS&Stiffness
**
*Step
*MATRIX GENERATE, MASS, STIFFNESS
*MATRIX OUTPUT, MASS, STIFFNESS
*END Step
**
** STEP: Step-1
**
*Step, name=Step-2, perturbation
eigenFrequency
*Frequency, eigensolver=Lanczos, acoustic coupling=on, normalization=displacement
100, , , , ,
**
** BOUNDARY CONDITIONS
**
** Name: fixLeft Type: Displacement/Rotation
*Boundary
Set-1, 1, 1
Set-1, 2, 2
Set-1, 6, 6
**
** OUTPUT REQUESTS
**
*Restart, write, frequency=0
**
** FIELD OUTPUT: F-Output-2
**
*Output, field, variable=PRESELECT
*Output, Field
*Node Print, Mode=1, Last Mode=30
U
*End Step
