*Heading
 analysis the eigen frequecies of the crank and get the mass and stiffness matrix
** Job name: CrankFrequency Model name: Crank
** Generated by: Abaqus/CAE Student Edition 6.12-2
*Preprint, echo=NO, model=NO, history=NO, contact=NO
**
** PARTS
**
*Part, name=CAT_131210_Pleuel
*Node
      1,           0.,   7.07232141,  -43.9344101
      2,           0.,   143.536163,   -21.967205
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*Element, type=C3D8R
  1,  24,  23,  80,  70, 176, 175, 232, 222
  2,  22,  21,  84,  75, 174, 173, 236, 227
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*Nset, nset=Set-2, generate
   1,  760,    1
*Elset, elset=Set-2, generate
   1,  484,    1
*Nset, nset=bigHoleLeft
  28,  29,  30,  31,  32,  33
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*Elset, elset=bigHoleLeft
   9,  10,  11,  12,  13,  14
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*Nset, nset=bigHoleRight
  17,  18,  19,  20,  21,  22
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*Elset, elset=bigHoleRight
   1,   2,   3,   4,   6,  25
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*Nset, nset=thickness, generate
  29,  637,  152
*Elset, elset=thickness, generate
  43,  406,  121
** Section: crankSection
*Solid Section, elset=Set-2, material=Steel
,
*End Part
**
**
** ASSEMBLY
**
*Assembly, name=Assembly
**
*Instance, name=CAT_131210_Pleuel-1, part=CAT_131210_Pleuel
*End Instance
**
*Nset, nset=smallHoleLeft, instance=CAT_131210_Pleuel-1
  44,  45,  46,  47,  48, 196
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*Elset, elset=smallHoleLeft, instance=CAT_131210_Pleuel-1
  20,  21,  49,  50, 141, 142, 170, 171, 262, 263, 291, 292, 383, 384, 412, 413
*Nset, nset=smallHoleRight, instance=CAT_131210_Pleuel-1
  41,  42,  43,  44,  45, 193
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*Elset, elset=smallHoleRight, instance=CAT_131210_Pleuel-1
  22,  23,  46,  70, 143, 144, 167, 191, 264, 265, 288, 312, 385, 386, 409, 433
*End Assembly
**
** MATERIALS
**
*Material, name=Steel
*Density
7987.,
*Elastic
 2.1e+11, 0.3
** ----------------------------------------------------------------
**
** MASS&Stiffness
**
*Step
*MATRIX GENERATE, MASS, STIFFNESS
**
** BOUNDARY CONDITIONS
**
** Name: fixCrankLeft Type: Displacement/Rotation
*Boundary
smallHoleLeft, 1, 1
smallHoleLeft, 2, 2
smallHoleLeft, 3, 3
smallHoleLeft, 4, 4
smallHoleLeft, 5, 5
smallHoleLeft, 6, 6
** Name: fixCrankRight Type: Displacement/Rotation
*Boundary
smallHoleRight, 1, 1
smallHoleRight, 2, 2
smallHoleRight, 3, 3
smallHoleRight, 4, 4
smallHoleRight, 5, 5
smallHoleRight, 6, 6
*MATRIX OUTPUT, MASS, STIFFNESS
*END Step
** ----------------------------------------------------------------
**
** STEP: FrequencyAnalysis_withConstrain
**
*Step, name=FrequencyAnalysis_withConstrain, perturbation
*Frequency, eigensolver=Lanczos, acoustic coupling=on, normalization=displacement
10, , , , ,
**
** BOUNDARY CONDITIONS
**
** Name: fixCrankLeft Type: Displacement/Rotation
*Boundary
smallHoleLeft, 1, 1
smallHoleLeft, 2, 2
smallHoleLeft, 3, 3
smallHoleLeft, 4, 4
smallHoleLeft, 5, 5
smallHoleLeft, 6, 6
** Name: fixCrankRight Type: Displacement/Rotation
*Boundary
smallHoleRight, 1, 1
smallHoleRight, 2, 2
smallHoleRight, 3, 3
smallHoleRight, 4, 4
smallHoleRight, 5, 5
smallHoleRight, 6, 6
**
** OUTPUT REQUESTS
**
*Restart, write, frequency=0
**
** FIELD OUTPUT: F-Output-2
**
*Output, field, variable=PRESELECT
*Output, Field
*Node Print, Mode=1, Last Mode=10
U
*End Step
